N := 44
i := 0 .. N
x[i] := 4*(i/N) + 6*((i/N)^2) = [
    0; 0.0940083; 0.194215; 0.30062; 0.413223; 0.532025; 0.657025; 0.788223; 0.92562; 1.06921
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]
q(t) :=
    if t ≤ 5
        1 + 0.2*t
    else if t ≤ 8
        2 + (t - 5)^2
    else
        11 - 1.5*(t - 8)
Seed(1)
nz := rnorm(N + 1, 0, 0.85)
y[i] := q(x[i]) + nz[i] = [
    1.43632; 1.6476; 1.025; 1.2971; 1.22048; 1.4706; 0.727476; 0.566441; 3.77605; 0.970337
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]
b := Spline2(x, y, 3) = [4; 6; 0; 0.834022; 2.00069; 3.5; 5.33402; 7.50069; 10; 1.5712; 0.833634; 2.09254; -0.164698; 3.93566; -2.11772; 12.0561; 8.13686; 7.83788; 0.918696; 0; 1.99647; 0.930464; 0.0662981]
b2 := Spline2(x, y, 3, 0.5) = [4; 4; 0; 3.53753; 6.92596; 8.90799; 10; 1.50052; 0.692878; 2.43093; 0.415928; 14.8607; 3.66896; 9.04394; 0.845808; 0; 1.86843; 0.730634; 0.0637565]
b3 := Spline2(x, y, 3, 0.001) = [4; 3; 0; 2.00069; 5.33402; 10; 1.73441; 0.251882; 3.23884; -2.54494; 13.8526; 7.03298; 1.05365; 0; 1.6033; 0.308113; 0.0122648]
