N := 30
i := 0 .. N
x[i] := i/3 = [
    0; 0.333333; 0.666667; 1; 1.33333; 1.66667; 2; 2.33333; 2.66667; 3
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]
q(t) := 5 + sin(t/2)
Seed(2)
nz := rnorm(N + 1, 0, 0.4)
y[i] := q(x[i]) + nz[i] = [
    4.82441; 4.89413; 5.13788; 5.09884; 4.9441; 5.75759; 5.79322; 6.14202; 6.84865; 6.32099
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]
k2 := [0; 5; 10]
k4 := [0; 2.5; 5; 7.5; 10]
k5 := [0; 2; 4; 6; 8; 10]
k8 := [0; 1.25; 2.5; 3.75; 5; 6.25; 7.5; 8.75; 10]
k10 := [0; 1; 2; 3; 4; 5; 6; 7; 8; 9; 10]
s2 := Spline2(x, y, 3, k2) = [4; 2; 0; 5; 10; 4.38562; 6.71287; 5.89658; 3.94197; 3.74937; 0.403042; 0; 1.52439; 0.303989; 0.0116899]
s4 := Spline2(x, y, 3, k4) = [4; 4; 0; 2.5; 5; 7.5; 10; 4.93754; 4.41649; 7.32542; 5.53599; 3.95449; 4.68866; 3.30771; 0.307978; 0; 2.29881; 0.988943; 0.302506]
s5 := Spline2(x, y, 3, k5) = [4; 5; 0; 2; 4; 6; 8; 10; 4.96481; 4.33285; 6.64667; 6.3312; 4.91968; 3.94456; 4.72731; 3.21412; 0.314301; 0; 2.24048; 0.992091; 0.165847]
s8 := Spline2(x, y, 3, k8) = [4; 8; 0; 1.25; 2.5; 3.75; 5; 6.25; 7.5; 8.75; 10; 4.79304; 5.22715; 4.55845; 6.93512; 6.23381; 5.59308; 4.70618; 4.63292; 3.61261; 5.06697; 2.97968; 0.278009; 0; 2.55267; 0.999996; 0.177752]
s10 := Spline2(x, y, 3, k10) = [
    4; 10; 0; 1; 2; 3; 4; 5; 6; 7
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]
sq := Spline2(x, y, 2, k5) = [3; 5; 0; 2; 4; 6; 8; 10; 4.87242; 4.82622; 6.92688; 5.49742; 4.37115; 4.47391; 3.4165; 0.313082; 0; 2.31425; 0.990228; 0.318761]
sf := Spline2(x, y, 4, k5)  # error: The value of one of the arguments is too large.
